# Motorok
I_fazis := 1.68 A
V_fazis := 3.4 V
α_motor := 1.8 deg
5 m*sin(0.1 deg) = 0.872664 cm
# Fogaskerekek
a := 30 cm = 0.3 m
i := 10
asin(a/(2*10 m))*2 = 1.71894 deg
α_torony := α_motor/i = 0.18 deg
# Tévedés 5 méteren: | Tévedés 10 méteren:
5 m*sin(α_torony/2) = 0.785398 cm
10 m*sin(α_torony/2) = 1.5708 cm
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# Sebesség 10 km/h futóval
v_t := 10 km/hr = 2.77778 m/s
r_1 := 1 m
r_2 := 3 m
r_3 := 5 m
r_4 := 10 m
rpm_1 := v_t/(2*π*r_1) = 26.5258 1/min
rpm_3 := v_t/(2*π*r_3) = 5.30516 1/min
rpm_2 := v_t/(2*π*r_2) = 8.84194 1/min
rpm_4 := v_t/(2*π*r_4) = 2.65258 1/min
